*Heading
** Job name: Job-5 Model name: Model-1
** Generated by: Abaqus/CAE 2016
*Preprint, echo=NO, model=NO, history=NO, contact=NO
**
** PARTS
**
*Part, name=plate
*Node
      1,  0.100100003, 0.00499993283,           0.
      2,           0., 0.00499987509,           0.
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*Element, type=EC3D8R
   1,  593, 1177, 2029,  592,    1,   19,  302,    4
   2, 1177, 1178, 2030, 2029,   19,   20,  301,  302
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*Nset, nset=Set-1, generate
    1,  4488,     1
*Elset, elset=Set-1, generate
    1,  2046,     1
** Section: platesection
*Eulerian Section, elset=Set-1
platematerial, platematerial-1
*Surface, type=EULERIAN MATERIAL, name=platematerial-1
platematerial-1
*End Part
**
*Part, name=press
*Node
      1,           0.,           0., 0.000699999975
      2, 0.0146396207,           0., 0.000699999975
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*Element, type=S4R
 1,  1, 13, 40,  4
 2, 13, 14, 39, 40
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*Nset, nset=Set-1, generate
   1,  154,    1
*Elset, elset=Set-1, generate
  1,  77,   1
*Nset, nset=Set-2
 1,
*Elset, elset=_pressSurface_, internal, generate
  1,  77,   1
*Elset, elset=_pressSurface_E1, internal, generate
  1,  17,   1
*Surface, type=ELEMENT, name=pressSurface
_pressSurface_,
_pressSurface_E1, E1
** Section: presssection
*Shell Section, elset=Set-1, material=pressmaterial
0.001, 5
*End Part
**
**
** ASSEMBLY
**
*Assembly, name=Assembly
**
*Instance, name=plate-1, part=plate
*End Instance
**
*Instance, name=press-1, part=press
          0.,        0.005,           0.
*End Instance
**
*Node
      1,           0., 0.00499999989, 0.000699999975
*Nset, nset=Set-2, instance=plate-1
    1,    2,    3,    4,    7,    8
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*Elset, elset=Set-2, instance=plate-1, generate
 1002,  2046,     1
*Nset, nset=Set-4, instance=plate-1
   2,   3,   5,   6, 599, 600, 601, 602, 603, 604, 605, 606, 607, 608, 609, 610
*Elset, elset=Set-4, instance=plate-1, generate
  143,  1001,   143
*Nset, nset=Set-5, instance=plate-1
   5,   6,   7,   8, 303, 304
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*Elset, elset=Set-5, instance=plate-1, generate
  859,  1001,     1
*Nset, nset=Set-6, instance=plate-1
    1,    2,    3,    4,    5,    6
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*Elset, elset=Set-6, instance=plate-1, generate
    1,  1001,     1
*Nset, nset=Set-7
 1,
*Nset, nset=m_Set-1, instance=plate-1
 3,
** Constraint: Constraint-1
*Coupling, constraint name=Constraint-1, ref node=m_Set-1, surface=press-1.pressSurface
*Kinematic
*End Assembly
*Amplitude, name=Amp-1, definition=SMOOTH STEP
             0.,              0.,           0.001,              1.
**
** MATERIALS
**
*Material, name=platematerial
*Density
2700.,
*Elastic
 7e+10, 0.3
*Plastic
 2.2e+08,     0.
 2.3e+08, 0.0845
 2.5e+08, 0.0969
 2.6e+08, 0.1104
 2.6e+08, 0.1252
 2.7e+08, 0.1412
 2.8e+08, 0.1587
 2.9e+08, 0.1775
   3e+08, 0.1979
 3.1e+08, 0.2197
 3.2e+08, 0.2432
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 7.8e+08, 4.2097
*Material, name=pressmaterial
*Density
2700.,
*Elastic
 7e+10, 0.3
**
** INTERACTION PROPERTIES
**
*Surface Interaction, name=IntProp-1
*Friction
0.,
*Surface Behavior, pressure-overclosure=HARD
**
** BOUNDARY CONDITIONS
**
** Name: displacement Type: Displacement/Rotation
*Boundary
m_Set-1, 2, 2
** Name: planeFix Type: Displacement/Rotation
*Boundary
Set-6, 3, 3
** Name: symmetryX Type: Symmetry/Antisymmetry/Encastre
*Boundary
Set-4, XSYMM
** Name: symmetryY Type: Symmetry/Antisymmetry/Encastre
*Boundary
Set-5, YSYMM
**
** PREDEFINED FIELDS
**
** Name: Predefined Field-1   Type: Material assignment
*Initial Conditions, type=VOLUME FRACTION
plate-1.Set-1, plate-1.platematerial-1, 1.
** ----------------------------------------------------------------
**
** STEP: Step-1
**
*Step, name=Step-1, nlgeom=YES
*Dynamic, Explicit
, 0.001
*Bulk Viscosity
0.06, 1.2
**
** BOUNDARY CONDITIONS
**
** Name: displacement Type: Displacement/Rotation
*Boundary, amplitude=Amp-1
m_Set-1, 2, 2, -0.0025
**
** INTERACTIONS
**
** Interaction: Int-1
*Contact, op=NEW
*Contact Inclusions, ALL EXTERIOR
*Contact Property Assignment
 ,  , IntProp-1
**
** OUTPUT REQUESTS
**
*Restart, write, number interval=1, time marks=NO
**
** FIELD OUTPUT: F-Output-1
**
*Output, field, variable=PRESELECT
**
** HISTORY OUTPUT: H-Output-1
**
*Output, history, variable=PRESELECT
*End Step
