*Heading
** Job name: Sample-45 Model name: Model-1
** Generated by: Abaqus/CAE 2016
*Preprint, echo=NO, model=NO, history=NO, contact=NO
**
** PARTS
**
*Part, name=sample
*Node
      1,           0., 0.0149999997
      2,           0.,       0.0148
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*Element, type=CPS4R
   1,    1,    2,   78,   77
   2,    2,    3,   79,   78
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*Node
   1217, 0.00150000001, 0.0149999997,           0.
*Nset, nset=sample-RefPt_, internal
1217,
*Nset, nset=RP-Pull
 1217,
*Nset, nset=Set-3, generate
    1,  1216,     1
*Elset, elset=Set-3, generate
    1,  1125,     1
*Orientation, name=Ori-1
          1.,           0.,           0.,           0.,           1.,           0.
3, 0.
** Section: Section-1
*Solid Section, elset=Set-3, orientation=Ori-1, material=sample_material
,
*End Part
**
**
** ASSEMBLY
**
*Assembly, name=Assembly
**
*Instance, name=sample-1, part=sample
*End Instance
**
*Nset, nset=Set-3, instance=sample-1, generate
   76,  1216,    76
*Elset, elset=Set-3, instance=sample-1, generate
   75,  1125,    75
*Nset, nset=Set-4, instance=sample-1
 1217,
*Nset, nset=m_Set-1, instance=sample-1
 1217,
*Nset, nset=s_Set-1, instance=sample-1, generate
    1,  1141,    76
*Elset, elset=s_Set-1, instance=sample-1, generate
    1,  1051,    75
*Surface, type=NODE, name=s_Set-1_CNS_, internal
s_Set-1, 1.
** Constraint: Constraint-1
*Coupling, constraint name=Constraint-1, ref node=m_Set-1, surface=s_Set-1_CNS_
*Kinematic
*End Assembly
**
** MATERIALS
**
*Material, name=sample_material
*Anisotropic Hyperelastic, holzapfel, local direction=2
55000.,   1e-08, 6.5e+07,     85.,     0.2
** ----------------------------------------------------------------
**
** STEP: Step-1
**
*Step, name=Step-1, nlgeom=YES
*Static
0.1, 1., 1e-10, 0.1
**
** BOUNDARY CONDITIONS
**
** Name: BC-1 Type: Symmetry/Antisymmetry/Encastre
*Boundary
Set-3, ENCASTRE
** Name: BC-2 Type: Displacement/Rotation
*Boundary
Set-4, 2, 2, 0.00375
**
** OUTPUT REQUESTS
**
*Restart, write, frequency=0
**
** FIELD OUTPUT: F-Output-1
**
*Output, field, variable=PRESELECT
**
** HISTORY OUTPUT: H-Output-2
**
*Output, history
*Node Output, nset=sample-1.RP-Pull
RF2, U2
*End Step
