*Heading
** Job name: Sample-45 Model name: Model-1
** Generated by: Abaqus/CAE 6.13-5
*Preprint, echo=NO, model=NO, history=NO, contact=NO
**
** PARTS
*Include, input=./param.inp
**
*Part, name=sample
*Node
      1, 0.0068321228,          2.5
      2,          1.5,          2.5
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*Element, type=CPS8
 1,   1,  16, 114,  37, 218, 219, 220, 221
 2,  16,  17, 115, 114, 222, 223, 224, 219
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*Node
    614, 0.0068321228,          7.5,           0.
*Nset, nset=sample-RefPt_, internal
614,
*Nset, nset=RP-Pull
 614,
*Nset, nset=Fixed-Bottom
  12,  13,  15,  86,  87, 112, 113, 482, 502, 522, 609, 611, 613
*Elset, elset=Fixed-Bottom
 115, 125, 135, 178, 179, 180
*Nset, nset=Pull-region
   3,   4,   6,  27,  28,  40,  41, 285, 288, 290, 349, 352, 353
*Elset, elset=Pull-region
 28, 29, 30, 58, 59, 60
*Nset, nset=Sample, generate
   1,  613,    1
*Elset, elset=Sample, generate
   1,  180,    1
*Nset, nset=Stress-region
   1,   2,   5,   7,   8,   9
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*Elset, elset=Stress-region
  61,  62,  63,  64,  65,  66
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*Orientation, name=Ori-1
0.707106781186548, 0.707106781186548,           0., -0.707106781186548, 0.707106781186548,           0.
3, 0.
** Section: Section-sample
*Solid Section, elset=Sample, orientation=Ori-1, material=Material-1
0.5,
*End Part
**
**
** ASSEMBLY
**
*Assembly, name=Assembly
**
*Instance, name=sample-1, part=sample
*End Instance
**
*Surface, type=NODE, name=sample-1_Pull-region_CNS_, internal
sample-1.Pull-region, 1.
** Constraint: Constraint-RP
*Coupling, constraint name=Constraint-RP, ref node=sample-1.RP-Pull, surface=sample-1_Pull-region_CNS_
*Kinematic
*End Assembly
**
** MATERIALS
**
*Material, name=Material-1
*Anisotropic Hyperelastic, holzapfel, local direction=2
<C10>, <D>, <k1>, <k2>, <kappa>
**
** BOUNDARY CONDITIONS
**
** Name: BC-fix Type: Symmetry/Antisymmetry/Encastre
*Boundary
sample-1.Fixed-Bottom, ENCASTRE
** ----------------------------------------------------------------
**
** STEP: Pull
**
*Step, name=Pull, nlgeom=YES
*Static
0.01, 1., 1e-15, 0.1
**
** BOUNDARY CONDITIONS
**
** Name: BC-pull Type: Displacement/Rotation
*Boundary
sample-1.RP-Pull, 1, 1
sample-1.RP-Pull, 2, 2, 3.75
sample-1.RP-Pull, 6, 6
**
** OUTPUT REQUESTS
**
*Restart, write, frequency=0
**
** FIELD OUTPUT: F-Output-1
**
*Output, field, variable=PRESELECT
**
** HISTORY OUTPUT: H-Output-1
**
*Output, history
*Node output, nset=sample-1.RP-Pull
RF2, U2
*End Step
